! Inverter modeled as a voltage-controlled current source (VCCS)

New XYcurve.VIcurve npts=3 xarray=[0 1.0 1.1] yarray=[0 1.0 0.0]

New VCCS.Inverter1 phases=3 bus1=inv_bus.1.2.3
~ basekv=0.48
~ ratedkVA=100
~ vi_curve=VIcurve
~ kvarmax=50
~ kVArmin=-50
