! 3-phase bolted faults
New Fault.F3_RG60  phases=3 bus1=RG60.1.2.3   r=0.0001 enabled=No
New Fault.F3_632   phases=3 bus1=632.1.2.3    r=0.0001 enabled=No
New Fault.F3_633   phases=3 bus1=633.1.2.3    r=0.0001 enabled=No
New Fault.F3_671   phases=3 bus1=671.1.2.3    r=0.0001 enabled=No
New Fault.F3_675   phases=3 bus1=675.1.2.3    r=0.0001 enabled=No
New Fault.F3_680   phases=3 bus1=680.1.2.3    r=0.0001 enabled=No
New Fault.F3_692   phases=3 bus1=692.1.2.3    r=0.0001 enabled=No
New Fault.F3_670   phases=3 bus1=670.1.2.3    r=0.0001 enabled=No

! Secondary (0.48 kV) 3-phase fault at bus 634
New Fault.F3_634   phases=3 bus1=634.1.2.3    r=0.0001 enabled=No

!Single-line-to-ground (SLG) faults
New Fault.F1_645B  phases=1 bus1=645.2        r=0.0001 enabled=No   ! phase B at bus 645
New Fault.F1_611C  phases=1 bus1=611.3        r=0.0001 enabled=No   ! phase C at bus 611
New Fault.F1_652A  phases=1 bus1=652.1        r=0.0001 enabled=No   ! phase A at bus 652

! Line-to-line (L-L) faults
New Fault.FLL_646BC phases=1 bus1=646.2.3     r=0.0001 enabled=No   ! B-C at bus 646
New Fault.FLL_692CA phases=1 bus1=692.3.1     r=0.0001 enabled=No   ! C-A at bus 692

! --- Base solve settings ---
set maxiterations=50
set controlmode=static
set mode=snapshot
set stepsize=1h

! Make sure all fault elements start disabled
Disable Fault.*

! RUN 3-PHASE FAULTS
Disable Fault.*  ! safety
Enable Fault.F3_RG60
set casename=F3_RG60
solve
export currents
export voltages
export powers
Disable Fault.F3_RG60

Enable Fault.F3_632
set casename=F3_632
solve
export currents
export voltages
export powers
Disable Fault.F3_632

Enable Fault.F3_633
set casename=F3_633
solve
export currents
export voltages
export powers
Disable Fault.F3_633

Enable Fault.F3_671
set casename=F3_671
solve
export currents
export voltages
export powers
Disable Fault.F3_671

Enable Fault.F3_675
set casename=F3_675
solve
export currents
export voltages
export powers
Disable Fault.F3_675

Enable Fault.F3_680
set casename=F3_680
solve
export currents
export voltages
export powers
Disable Fault.F3_680

Enable Fault.F3_692
set casename=F3_692
solve
export currents
export voltages
export powers
Disable Fault.F3_692

Enable Fault.F3_670
set casename=F3_670
solve
export currents
export voltages
export powers
Disable Fault.F3_670

! Secondary fault at bus 634
Enable Fault.F3_634
set casename=F3_634
solve
export currents
export voltages
export powers
Disable Fault.F3_634

! RUN SLG FAULTS
Enable Fault.F1_645B
set casename=F1_645B
solve
export currents
export voltages
export powers
Disable Fault.F1_645B

Enable Fault.F1_611C
set casename=F1_611C
solve
export currents
export voltages
export powers
Disable Fault.F1_611C

Enable Fault.F1_652A
set casename=F1_652A
solve
export currents
export voltages
export powers
Disable Fault.F1_652A

! RUN L-L FAULTS
Enable Fault.FLL_646BC
set casename=FLL_646BC
solve
export currents
export voltages
export powers
Disable Fault.FLL_646BC

Enable Fault.FLL_692CA
set casename=FLL_692CA
solve
export currents
export voltages
export powers
Disable Fault.FLL_692CA
